*Heading
** Job name: necking Model name: necking1
** Generated by: Abaqus/CAE 2016.HF2
*Preprint, echo=NO, model=NO, history=NO, contact=NO
**
** PARTS
**
*Part, name=PART-1
*Node
      1,           0.,           0.
      2, 0.0500000007,           0.
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*Element, type=CAX4R
   1,    1,    3,  203,  201
   2,    3,    5,  205,  203
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*Elset, elset=EALL
    1,    2,    3,    4,    5,    6
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** Section: Section-1-EALL
*Solid Section, elset=EALL, material=MAT1
,
*End Part
**
**
** ASSEMBLY
**
*Assembly, name=Assembly
**
*Instance, name=PART-1-1, part=PART-1
*End Instance
**
*Nset, nset=BOT, instance=PART-1-1, generate
  1,  21,   1
*Nset, nset=BOT1, instance=PART-1-1, generate
  1,  20,   1
*Nset, nset=BOT3, instance=PART-1-1, generate
 201,  221,    1
*Nset, nset=LEFT, instance=PART-1-1, generate
  201,  6401,   100
*Nset, nset=NALL, instance=PART-1-1
  201,  202,  203,  204,  205,  206
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*Nset, nset=TOP, instance=PART-1-1, generate
 6601,  6621,     1
*End Assembly
**
** MATERIALS
**
*Material, name=MAT1
*Elastic
300., 0.3
*Plastic
    1.,         0.
  1.05, 0.00167236
   1.1, 0.00431525
  1.15, 0.00836493
   1.2,  0.0144205
  1.25,  0.0232937
   1.3,  0.0360701
  1.35,  0.0541855
   1.4,  0.0795178
  1.42,  0.0921948
  1.44,   0.106593
  1.46,   0.122915
  1.48,   0.141387
   1.5,   0.162254
  1.52,   0.185789
  1.54,    0.21229
  1.56,   0.242083
  1.58,   0.275527
   1.6,   0.313013
  1.65,   0.427318
   1.7,   0.577485
  1.75,   0.773177
 1.795,   0.997982
*Porous Metal Plasticity, relative density=1.
 1.5,   1., 2.25
*Void Nucleation
 0.3,  0.1, 0.04
** ----------------------------------------------------------------
**
** STEP: Step-1
**
*Step, name=Step-1, nlgeom=YES, inc=400
*Static
0.001, 1.5, 1.5e-05, 0.03
**
** BOUNDARY CONDITIONS
**
** Name: Disp-BC-1 Type: Displacement/Rotation
*Boundary
BOT, 2, 2
** Name: Disp-BC-2 Type: Displacement/Rotation
*Boundary
LEFT, 1, 1
** Name: Disp-BC-3 Type: Displacement/Rotation
*Boundary
TOP, 2, 2, 0.76
**
** OUTPUT REQUESTS
**
*Restart, write, frequency=100
**
** FIELD OUTPUT: F-Output-1
**
*Output, field, variable=PRESELECT
**
** HISTORY OUTPUT: H-Output-1
**
*Output, history, variable=PRESELECT
*End Step
** ----------------------------------------------------------------
**
** STEP: Step-2
**
*Step, name=Step-2, nlgeom=YES, inc=400
*Static
0.001, 0.1, 1e-06, 0.03
**
** BOUNDARY CONDITIONS
**
** Name: Disp-BC-1 Type: Displacement/Rotation
*Boundary, op=NEW
BOT, 2, 2
** Name: Disp-BC-2 Type: Displacement/Rotation
*Boundary, op=NEW
LEFT, 1, 1
** Name: Disp-BC-3 Type: Displacement/Rotation
*Boundary, op=NEW
** Name: Disp-BC-4 Type: Displacement/Rotation
*Boundary, op=NEW
TOP, 2, 2, 0.79
**
** OUTPUT REQUESTS
**
*Restart, write, frequency=100
**
** FIELD OUTPUT: F-Output-1
**
*Output, field, variable=PRESELECT
**
** HISTORY OUTPUT: H-Output-1
**
*Output, history, variable=PRESELECT
*End Step
